// SBML level 3 version 1

model P2011()
  // model units - substance: substance, time: time_unit, volume: volume, area: area, length: length, extent: extent

  // Compartments:
  compartment cell = 1;

  // Species:
  species cL_m in cell = 1.05129*240.3983;
  species cL in cell = 0.1348822;
  species cLmod in cell = 0.153619;
  species cP in cell = 9.417774e-32;
  species cP9_m in cell = 0.06560635*69.52282;
  species cP9 in cell = 0.04446003;
  species cP7_m in cell = 0.4296861*36.71515;
  species cP7 in cell = 0.2345753;
  species cP5_m in cell = 0.7780014*10.81501;
  species cP5 in cell = 0.4989012;
  species cT_m in cell = 0.09287982*98.71394;
  species cT in cell = 0.5587003;
  species cE4_m in cell = 0.09498864*59.1002;
  species cE4 in cell = 1.090654;
  species cE3_m in cell = 0.282857*37.42708;
  species cE3c in cell = 0.1450908;
  species cE3n in cell = 0.005973189;
  species cLUX_m in cell = 0.09498864*59.1002;
  species cLUX in cell = 4.644944;
  species cCOP1c in cell = 0.23;
  species cCOP1n in cell = 0.276;
  species cCOP1d in cell = 0.092;
  species cEGc in cell = 0.2343603;
  species cEC in cell = 0.009388265;
  species cZTL in cell = 0.1139255;
  species cZG in cell = 0.8354256;
  species cG_m in cell = 0.09683009*71.23151;
  species cGc in cell = 0.03396248;
  species cGn in cell = 0.4521165;
  species cEGn in cell = 0.1121122;
  species cE34 in cell = 0.02902286;

  // Parameters:
  q1 = 224.0702;
  light = 1;
  gml = 1;
  n1 = 1012.377;
  g1 = 0.09249894;
  m1 = 0.4724782;
  m2 = 0.2703834;
  p2 = 0.001228788;
  p1 = 0.0008903847;
  m3 = 0.2097267;
  p3 = 0.1385073;
  g3 = 0.4019076;
  p7 = 0.3;
  m11 = 1;
  q3 = 175.7581;
  gm9 = 1;
  g8 = 0.0137279;
  n4 = 3.793959;
  n7 = 14.21676;
  g9 = 0.3032076;
  m12 = 1.518725;
  p8 = 0.006909827;
  m13 = 0.5009145;
  m22 = 0.06241193;
  n8 = 18.40368;
  g10 = 0.6138885;
  gm7 = 1;
  n9 = 5.885;
  g11 = 0.8271416;
  m14 = 0.44088;
  p9 = 0.0180063;
  m15 = 0.9826348;
  m23 = 1.480577;
  n10 = 5.015127;
  g12 = 0.153738;
  gm5 = 1;
  n11 = 6.69497;
  g13 = 1.118669;
  m16 = 0.6325103;
  p10 = 0.05218831;
  m17 = 0.6066097;
  m24 = 0.07667447;
  n2 = 74.52028;
  g4 = 0.01518642;
  g5 = 0.1907827;
  gmt = 1;
  m5 = 0.3656035;
  p4 = 0.005807616;
  m6 = 0.1069233;
  m7 = 0.2022048;
  p5 = 10.54107;
  m8 = 0.3865585;
  n13 = 123.3977;
  g2 = 0.02003961;
  g6 = 0.2228764;
  gm4 = 1;
  m34 = 0.6398256;
  p23 = 0.004892924;
  m35 = 0.247772;
  p25 = 17.73245;
  p21 = 2.653905;
  n3 = 17.90302;
  g16 = 0.2559106;
  gm3 = 1;
  m26 = 0.4122443;
  p16 = 0.02621873;
  m9 = 5.236286;
  p17 = 63.66438;
  p19 = 1.692524;
  p20 = 0.08571498;
  m30 = 13.07228;
  m29 = 15.47672;
  p27 = 0.02620301;
  m39 = 0.3942305;
  p26 = 0.1794914;
  n5 = 0.23;
  p6 = 0.6;
  m27 = 0.1;
  p15 = 3;
  n6 = 20;
  n14 = 0.1;
  m31 = 0.3;
  m33 = 13;
  p18 = 0.2369105;
  p31 = 0.1407957;
  m36 = 0.09886276;
  m37 = 0.6386712;
  m32 = 0.1778675;
  p24 = 11.26451;
  g7 = 0.1992601;
  p14 = 0.271471;
  p12 = 30.42926;
  p13 = 0.07655707;
  m20 = 1.239247;
  m21 = 0.08003045;
  q2 = 149.3938;
  gmg = 1;
  n12 = 1047.342;
  g14 = 0.006945862;
  g15 = 0.3841966;
  m18 = 4.175281;
  p11 = 0.01043488;
  m19 = 1.184998;
  p28 = 21.51977;
  p29 = 0.3058042;
  m10 = 4.164753;
  cEG = 0.003814908;
  m4 = 0.2;

  // Assignment rules:
  cGn_tot := cGn + cEGn;

  // Reactions:
  cL_m_trscr: => cL_m; cell*(q1*light*cP*gml + n1*g1^2/(g1^2 + (cP9 + cP7 + cP5 + cT)^2)*gml - (m1*light + m2*(1 - light))*cL_m);  // modifiers: cT, cP, cP7, cP5, cP9
  cL_m_trans: => cL; cell*((p2 + p1*light)*cL_m/gml - m3*cL - p3*cL^2/(cL^2 + g3^2));  // modifiers: cL_m
  cL_mod_pro: => cLmod; cell*(p3*cL^2/(cL^2 + g3^2) - m3*cLmod);  // modifiers: cL
  cP_prod: => cP; cell*(p7*(1 - light)*(1 - cP) - m11*cP*light);
  cP9_m_trscr: => cP9_m; cell*(light*q3*cP*gm9 + g8/(g8 + cEC)*(n4 + n7*cL^2/(cL^2 + g9^2))*gm9 - m12*cP9_m);  // modifiers: cEC, cP, cL
  cP9_trans: => cP9; cell*(p8*cP9_m/gm9 - (m13 + m22*(1 - light))*cP9);  // modifiers: cP9_m
  cP7_m_trscr: => cP7_m; cell*(n8*(cL + cLmod)^2/(g10^2 + (cL + cLmod)^2)*gm7 + n9*cP9^2/(g11^2 + cP9^2)*gm7 - m14*cP7_m);  // modifiers: cLmod, cL, cP9
  cP7_trans: => cP7; cell*(p9*cP7_m/gm7 - (m15 + m23*(1 - light))*cP7);  // modifiers: cP7_m
  cP5_trscr: => cP5_m; cell*(n10*cLmod^2/(g12^2 + cLmod^2)*gm5 + n11*cP7^2/(g13^2 + cP7^2)*gm5 - m16*cP5_m);  // modifiers: cLmod, cP7
  cP5_trans: => cP5; cell*(p10*cP5_m/gm5 - (m17 + m24*(1 - light))*cP5);  // modifiers: cP5_m
  cT_m_trscr: => cT_m; cell*(n2*g4/(g4 + cEC)*g5^2/(g5^2 + cL^2)*gmt - m5*cT_m);  // modifiers: cEC, cL
  cT_trans: => cT; cell*(p4*cT_m/gmt - (m6 + m7*(1 - light))*cT*(cZTL*p5 + cZG) - m8*cT);  // modifiers: cZG, cT_m, cZTL
  cE4_trscr: => cE4_m; cell*(n13*g2/(g2 + cEC)*g6^2/(g6^2 + cL^2)*gm4 - m34*cE4_m);  // modifiers: cEC, cL
  cE4_trans: => cE4; cell*(p23*cE4_m/gm4 - m35*cE4 - p25*cE4*cE3n + p21*cE34);  // modifiers: cE3n, cE4_m, cE34
  cE3_trscr: => cE3_m; cell*(n3*g16^2/(g16^2 + cL^2)*gm3 - m26*cE3_m);  // modifiers: cL
  cE3c_trans: => cE3c; cell*(p16*cE3_m/gm3 - m9*cE3c*cCOP1c - p17*cE3c*cGc - p19*cE3c + p20*cE3n);  // modifiers: cE3n, cGc, cE3_m, cCOP1c
  cE3n_trans: => cE3n; cell*(p19*cE3c - p20*cE3n - p17*cE3n*cGn - m30*cE3n*cCOP1d - m29*cE3n*cCOP1n + p21*cE34 - p25*cE4*cE3n);  // modifiers: cGn, cE4, cE3c, cCOP1d, cCOP1n, cE34
  cLUX_trscr: => cLUX_m; cell*(n13*g2/(g2 + cEC)*g6^2/(g6^2 + cL^2)*gm4 - m34*cLUX_m);  // modifiers: cEC, cL
  cLUX_trans: => cLUX; cell*(p27*cLUX_m/gm4 - m39*cLUX - p26*cLUX*cE34);  // modifiers: cE34, cLUX_m
  cCOP1c_prod: => cCOP1c; cell*(n5 - p6*cCOP1c - m27*cCOP1c*(1 + p15*light));
  cCOP1n_trans: => cCOP1n; cell*(p6*cCOP1c - n6*light*cP*cCOP1n - n14*cCOP1n - m27*cCOP1n*(1 + p15*light));  // modifiers: cP, cCOP1c
  cCOP1d_trans: => cCOP1d; cell*(n14*cCOP1n + n6*light*cP*cCOP1n - m31*(1 + m33*(1 - light))*cCOP1d);  // modifiers: cP, cCOP1n
  cEGc_prod: => cEGc; cell*(p17*cE3c*cGc - m9*cEGc*cCOP1c - p18*cEGc + p31*cEGn);  // modifiers: cEGn, cGc, cE3c, cCOP1c
  cEC_form: => cEC; cell*(p26*cLUX*cE34 - m36*cEC*cCOP1n - m37*cEC*cCOP1d - m32*cEC*(1 + p24*light*cGn_tot^2/(g7^2 + cGn_tot^2)));  // modifiers: cLUX, cCOP1d, cCOP1n, cE34
  cZTL_prod: => cZTL; cell*(p14 - p12*light*cZTL*cGc + p13*cZG*(1 - light) - m20*cZTL);  // modifiers: cZG, cGc
  cZG_prod: => cZG; cell*(p12*light*cZTL*cGc - p13*cZG*(1 - light) - m21*cZG);  // modifiers: cGc, cZTL
  cG_m_trscr: => cG_m; cell*(light*q2*cP*gmg + n12*g14/(g14 + cEC)*g15^2/(g15^2 + cL^2)*gmg - m18*cG_m);  // modifiers: cEC, cP, cL
  cG_trans: => cGc; cell*(p11*cG_m/gmg - p12*light*cZTL*cGc + p13*cZG*(1 - light) - m19*cGc - p17*cE3c*cGc - p28*cGc + p29*cGn);  // modifiers: cZG, cGn, cE3c, cG_m, cZTL
  cGn_traspo: => cGn; cell*(p28*cGc - (p29 + m19 + p17*cE3n)*cGn);  // modifiers: cE3n, cGc
  cE34_compl: => cE34; cell*(p25*cE4*cE3n - (p26*cLUX + p21 + m37*cCOP1d + m36*cCOP1n)*cE34);  // modifiers: cE3n, cLUX, cE4, cCOP1d, cCOP1n
  cEGn_tranp: => cEGn; cell*(p18*cEGc + p17*cE3n*cGn - (m9*cCOP1n + m10*cCOP1d + p31)*cEGn);  // modifiers: cE3n, cGn, cEGc, cCOP1d, cCOP1n

  // Unit definitions:
  unit substance = 1e-9 mole; substance is "nM (default)";
  unit extent = 1e-9 mole;
  unit time_unit = 3600 second; time_unit is "hour (default)";
  unit area = metre^2;
  unit length = metre;
  unit volume = litre;
end
