// SBML level 3 version 1

model U2020_2()
  // model units - substance: substance, time: time_unit, volume: volume, area: area, length: length, extent: extent

  // Compartments:
  compartment cell = 1;

  // Species:
  species cL_m in cell = 1.05129*240.3983;
  species cL in cell = 0.5393536;
  species cLmod in cell = 0.0844582;
  species cP in cell = 0.9563919;
  species cP9_m in cell = 0.06560635*69.52282;
  species cP9 in cell = 0.02411604;
  species cP7_m in cell = 0.4296861*36.71515;
  species cP7 in cell = 0.1249702;
  species cP5_m in cell = 0.7780014*10.81501;
  species cP5 in cell = 0.6829321;
  species cT_m in cell = 0.09287982*98.71394;
  species cT in cell = 0.04134787;
  species cE4_m in cell = 0.09498864*59.1002;
  species cE4 in cell = 0.1982184;
  species cE3_m in cell = 0.282857*37.42708;
  species cE3c in cell = 0.1439116;
  species cE3n in cell = 0.0276005;
  species cLUX_m in cell = 0.09498864*59.1002;
  species cLUX in cell = 0.5536634;
  species cCOP1c in cell = 0.3269277;
  species cCOP1n in cell = 0.6558904;
  species cCOP1d in cell = 0.2511719;
  species cEGc in cell = 0;
  species cEC in cell = 0.06899054;
  species cZTL in cell = 0.250996;
  species cZG in cell = 0.07732248;
  species cG_m in cell = 0.09683009*71.23151;
  species cGc in cell = 0.01910175;
  species cGn in cell = 0;
  species cEGn in cell = 0;
  species cE34 in cell = 0;

  // Parameters:
  q1 = 1.134726;
  L = 1;
  gml = 240.3983;
  n1 = 3.399285;
  g1 = 0.08449151;
  m1 = 0.5694988;
  m2 = 0.2388914;
  p2 = 0.2856409;
  p1 = 0.1505089;
  m3 = 0.1927992;
  p3 = 0.1001322;
  g3 = 0.5846223;
  p7 = 0.3;
  m11 = 1;
  q3 = 2.930045;
  gm9 = 69.52282;
  g8 = 0.01734872;
  n4 = 0.06983613;
  n7 = 0.2115181;
  g9 = 0.2822891;
  m12 = 1.007985;
  p8 = 0.6625383;
  m13 = 0.3564051;
  m22 = 0.0661091;
  n8 = 0.5070786;
  g10 = 0.492031;
  gm7 = 36.71515;
  n9 = 0.1889502;
  g11 = 0.6745128;
  m14 = 0.4044437;
  p9 = 0.7655911;
  m15 = 0.6577284;
  m23 = 1.592913;
  n10 = 0.3940953;
  g12 = 0.1997723;
  gm5 = 10.81501;
  n11 = 0.6470316;
  g13 = 1.099364;
  m16 = 0.5209503;
  p10 = 0.5736446;
  m17 = 0.5104074;
  m24 = 0.08812348;
  n2 = 0.6353486;
  g4 = 0.01719583;
  g5 = 0.1448021;
  gmt = 98.71394;
  m5 = 0.2983116;
  p4 = 0.5572127;
  m6 = 0.1081124;
  m7 = 0.2297868;
  p5 = 10.86551;
  m8 = 0.3889788;
  n13 = 2.033438;
  g2 = 0.01723058;
  g6 = 0.2905313;
  gm4 = 59.1002;
  m34 = 0.5967512;
  p23 = 0.26135;
  m35 = 0.2560064;
  p25 = 21.73114;
  p21 = 2.470333;
  n3 = 0.4365509;
  g16 = 0.300292;
  gm3 = 37.42708;
  m26 = 0.4944605;
  p16 = 0.9314242;
  m9 = 4.894843;
  p17 = 55.7229;
  p19 = 1.896249;
  p20 = 0.07753743;
  m30 = 10.93884;
  m29 = 13.29895;
  p27 = 1.762331;
  m39 = 0.3758441;
  p26 = 0.1851728;
  n5 = 0.23;
  p6 = 0.6;
  m27 = 0.1;
  p15 = 3;
  n6 = 20;
  n14 = 0.1;
  m31 = 0.3;
  m33 = 13;
  p18 = 0.2163965;
  p31 = 0.1373648;
  m36 = 0.1013836;
  m37 = 0.8236278;
  m32 = 0.1937101;
  p24 = 11.21234;
  g7 = 0.1743166;
  p14 = 0.3228531;
  p12 = 32.1891;
  p13 = 0.06918045;
  m20 = 1.258782;
  m21 = 0.07311689;
  q2 = 1.972284;
  gmg = 71.23151;
  n12 = 15.77259;
  g14 = 0.006941335;
  g15 = 0.3874913;
  m18 = 3.46851;
  p11 = 0.8041979;
  m19 = 1.414969;
  p28 = 19.50634;
  p29 = 0.3446482;
  m10 = 4.005384;
  cEG = 0.003814908;
  m4 = 0.2;

  // Assignment rules:
  cGn_tot := cGn + cEGn;

  // Reactions:
  cL_m_trscr: => cL_m; cell*(q1*L*cP*gml + n1*g1^2/(g1^2 + (cP9 + cP7 + cP5 + cT)^2)*gml - (m1*L + m2*(1 - L))*cL_m);  // modifiers: cP, cP7, cT, cP9, cP5
  cL_m_trans: => cL; cell*((p2 + p1*L)*cL_m/gml - m3*cL - p3*cL^2/(cL^2 + g3^2));  // modifiers: cL_m
  cL_mod_pro: => cLmod; cell*(p3*cL^2/(cL^2 + g3^2) - m3*cLmod);  // modifiers: cL
  cP_prod: => cP; cell*(p7*(1 - L)*(1 - cP) - m11*cP*L);
  cP9_m_trscr: => cP9_m; cell*(L*q3*cP*gm9 + g8/(g8 + cEC)*(n4 + n7*cL^2/(cL^2 + g9^2))*gm9 - m12*cP9_m);  // modifiers: cP, cL, cEC
  cP9_trans: => cP9; cell*(p8*cP9_m/gm9 - (m13 + m22*(1 - L))*cP9);  // modifiers: cP9_m
  cP7_m_trscr: => cP7_m; cell*(n8*(cL + cLmod)^2/(g10^2 + (cL + cLmod)^2)*gm7 + n9*cP9^2/(g11^2 + cP9^2)*gm7 - m14*cP7_m);  // modifiers: cP9, cL, cLmod
  cP7_trans: => cP7; cell*(p9*cP7_m/gm7 - (m15 + m23*(1 - L))*cP7);  // modifiers: cP7_m
  cP5_trscr: => cP5_m; cell*(n10*cLmod^2/(g12^2 + cLmod^2)*gm5 + n11*cP7^2/(g13^2 + cP7^2)*gm5 - m16*cP5_m);  // modifiers: cP7, cLmod
  cP5_trans: => cP5; cell*(p10*cP5_m/gm5 - (m17 + m24*(1 - L))*cP5);  // modifiers: cP5_m
  cT_m_trscr: => cT_m; cell*(n2*g4/(g4 + cEC)*g5^2/(g5^2 + cL^2)*gmt - m5*cT_m);  // modifiers: cL, cEC
  cT_trans: => cT; cell*(p4*cT_m/gmt - (m6 + m7*(1 - L))*cT*(cZTL*p5 + cZG) - m8*cT);  // modifiers: cT_m, cZG, cZTL
  cE4_trscr: => cE4_m; cell*(n13*g2/(g2 + cEC)*g6^2/(g6^2 + cL^2)*gm4 - m34*cE4_m);  // modifiers: cL, cEC
  cE4_trans: => cE4; cell*(p23*cE4_m/gm4 - m35*cE4 - p25*cE4*cE3n + p21*cE34);  // modifiers: cE4_m, cE34, cE3n
  cE3_trscr: => cE3_m; cell*(n3*g16^2/(g16^2 + cL^2)*gm3 - m26*cE3_m);  // modifiers: cL
  cE3c_trans: => cE3c; cell*(p16*cE3_m/gm3 - m9*cE3c*cCOP1c - p17*cE3c*cGc - p19*cE3c + p20*cE3n);  // modifiers: cGc, cCOP1c, cE3n, cE3_m
  cE3n_trans: => cE3n; cell*(p19*cE3c - p20*cE3n - p17*cE3n*cGn - m30*cE3n*cCOP1d - m29*cE3n*cCOP1n + p21*cE34 - p25*cE4*cE3n);  // modifiers: cCOP1d, cCOP1n, cGn, cE4, cE34, cE3c
  cLUX_trscr: => cLUX_m; cell*(n13*g2/(g2 + cEC)*g6^2/(g6^2 + cL^2)*gm4 - m34*cLUX_m);  // modifiers: cL, cEC
  cLUX_trans: => cLUX; cell*(p27*cLUX_m/gm4 - m39*cLUX - p26*cLUX*cE34);  // modifiers: cLUX_m, cE34
  cCOP1c_prod: => cCOP1c; cell*(n5 - p6*cCOP1c - m27*cCOP1c*(1 + p15*L));
  cCOP1n_trans: => cCOP1n; cell*(p6*cCOP1c - n6*L*cP*cCOP1n - n14*cCOP1n - m27*cCOP1n*(1 + p15*L));  // modifiers: cP, cCOP1c
  cCOP1d_trans: => cCOP1d; cell*(n14*cCOP1n + n6*L*cP*cCOP1n - m31*(1 + m33*(1 - L))*cCOP1d);  // modifiers: cP, cCOP1n
  cEGc_prod: => cEGc; cell*(p17*cE3c*cGc - m9*cEGc*cCOP1c - p18*cEGc + p31*cEGn);  // modifiers: cEGn, cGc, cCOP1c, cE3c
  cEC_form: => cEC; cell*(p26*cLUX*cE34 - m36*cEC*cCOP1n - m37*cEC*cCOP1d - m32*cEC*(1 + p24*L*cGn_tot^2/(g7^2 + cGn_tot^2)));  // modifiers: cCOP1d, cCOP1n, cLUX, cE34
  cZTL_prod: => cZTL; cell*(p14 - p12*L*cZTL*cGc + p13*cZG*(1 - L) - m20*cZTL);  // modifiers: cZG, cGc
  cZG_prod: => cZG; cell*(p12*L*cZTL*cGc - p13*cZG*(1 - L) - m21*cZG);  // modifiers: cGc, cZTL
  cG_m_trscr: => cG_m; cell*(L*q2*cP*gmg + n12*g14/(g14 + cEC)*g15^2/(g15^2 + cL^2)*gmg - m18*cG_m);  // modifiers: cP, cL, cEC
  cG_trans: => cGc; cell*(p11*cG_m/gmg - p12*L*cZTL*cGc + p13*cZG*(1 - L) - m19*cGc - p17*cE3c*cGc - p28*cGc + p29*cGn);  // modifiers: cZG, cGn, cG_m, cE3c, cZTL
  cGn_traspo: => cGn; cell*(p28*cGc - (p29 + m19 + p17*cE3n)*cGn);  // modifiers: cGc, cE3n
  cE34_compl: => cE34; cell*(p25*cE4*cE3n - (p26*cLUX + p21 + m37*cCOP1d + m36*cCOP1n)*cE34);  // modifiers: cCOP1d, cCOP1n, cE4, cLUX, cE3n
  cEGn_tranp: => cEGn; cell*(p18*cEGc + p17*cE3n*cGn - (m9*cCOP1n + m10*cCOP1d + p31)*cEGn);  // modifiers: cCOP1d, cCOP1n, cGn, cE3n, cEGc

  // Unit definitions:
  unit substance = 1e-9 mole; substance is "nM (default)";
  unit extent = 1e-9 mole;
  unit time_unit = 3600 second; time_unit is "hour (default)";
  unit area = metre^2;
  unit length = metre;
  unit volume = litre;
end
