// SBML level 3 version 1

model U2020_5()
  // model units - substance: substance, time: time_unit, volume: volume, area: area, length: length, extent: extent

  // Compartments:
  compartment cell = 1;

  // Species:
  species cL_m in cell = 0.03593354;
  species cL in cell = 0.07423137;
  species cLmod in cell = 0.02644931;
  species cP in cell = 3.327346e-209;
  species cP9_m in cell = 0.0003088349;
  species cP9 in cell = 0.007252039;
  species cP7_m in cell = 0.3196612;
  species cP7 in cell = 0.6097992;
  species cP5_m in cell = 0.03625358;
  species cP5 in cell = 0.1565451;
  species cT_m in cell = 0.4252253;
  species cT in cell = 0.6149945;
  species cE4_m in cell = 1.001982;
  species cE4 in cell = 1.713053;
  species cE3_m in cell = 0.7762759;
  species cE3c in cell = 0.2257497;
  species cE3n in cell = 0.01231657;
  species cLUX_m in cell = 1.001982;
  species cLUX in cell = 11.09485;
  species cCOP1c in cell = 0.23;
  species cCOP1n in cell = 0.276;
  species cCOP1d in cell = 0.092;
  species cEGc in cell = 0.2296075;
  species cEC in cell = 0.1599074;
  species cZTL in cell = 0.03471018;
  species cZG in cell = 6.516205;
  species cG_m in cell = 0.4109203;
  species cGc in cell = 0.02216213;
  species cGn in cell = 0.04335321;
  species cEGn in cell = 0.01504016;
  species cE34 in cell = 0.321176;

  // Parameters:
  q1 = 0.8414968;
  L = 1;
  gml = 240.3983;
  n1 = 0.7815379;
  g1 = 0.2602627;
  m1 = 0.5459862;
  m2 = 0.03489151;
  p2 = 0.2051493;
  p1 = 0.1881498;
  m3 = 0.1801503;
  p3 = 0.2065729;
  g3 = 0.8121004;
  p7 = 0.3;
  m11 = 1;
  n13 = 2.157019;
  g2 = 0.03372288;
  g6 = 0.1983677;
  gm4 = 59.1002;
  m34 = 0.5895086;
  p23 = 0.4388609;
  m35 = 0.2495298;
  p25 = 210.6433;
  p21 = 12.72883;
  n3 = 0.4393285;
  g16 = 0.2033453;
  gm3 = 37.42708;
  m26 = 0.4782725;
  p16 = 1.643521;
  m9 = 7.581251;
  p17 = 67.75348;
  p19 = 2.22496;
  p20 = 0.0799111;
  m30 = 2.969755;
  m29 = 29.30833;
  p27 = 4.553633;
  m39 = 0.5459092;
  p26 = 0.06062332;
  n5 = 0.23;
  p6 = 0.6;
  m27 = 0.1;
  p15 = 3;
  n6 = 20;
  n14 = 0.1;
  m31 = 0.3;
  m33 = 13;
  p18 = 0.07496391;
  p31 = 0.161869;
  m36 = 0.1514883;
  m37 = 1.054416;
  m32 = 0.08924368;
  p24 = 19.60064;
  g7 = 0.07795862;
  p14 = 0.3832057;
  p12 = 152.1519;
  p13 = 0.02052391;
  m20 = 7.487629;
  m21 = 0.02529838;
  q2 = 2.022678;
  gmg = 71.23151;
  n12 = 17.44491;
  g14 = 0.01376338;
  g15 = 0.2588172;
  m18 = 3.557124;
  p11 = 1.713332;
  m19 = 3.861796;
  p28 = 8.212894;
  p29 = 0.1604975;
  m10 = 16.37144;
  q3t = 1.906715;
  gm9 = 69.52282;
  nt1 = 0.09985172;
  g1t = 0.8213196;
  at1 = 0.01455083;
  g2t = 30.30112;
  g3t = 0.002073751;
  g4t = 0.1617681;
  m1t = 0.4226817;
  p1t = 5.15964;
  mp1t = 0.3872573;
  nt2 = 55.25737;
  g5t = 43.26179;
  g6t = 0.01342384;
  g7t = 0.06909724;
  gm7 = 36.71515;
  m2t = 0.2671678;
  p2t = 1.57146;
  mp2t = 0.9705051;
  mp3t = 21.05237;
  nt3 = 7.245251;
  g8t = 0.06240295;
  at2 = 3.648303;
  g9t = 0.6505629;
  g10t = 0.05838869;
  g11t = 0.2809306;
  gm5 = 10.81501;
  m3t = 16.54441;
  p3t = 0.6541709;
  mp4t = 0.379807;
  mp5t = 0.0006241121;
  nt4 = 0.3037758;
  g12t = 8.165692;
  at3 = 5.521712;
  g13t = 0.1962498;
  g14t = 0.02821239;
  g15t = 35.44812;
  gmt = 98.71394;
  m4t = 0.2195121;
  p4t = 1.305112;
  mp6t = 0.08946682;
  mp7t = 0.05443088;
  p5t = 2.062886;
  mp8t = 0.4011848;

  // Assignment rules:
  cGn_tot := cGn + cEGn;

  // Reactions:
  cL_m_trscr: => cL_m; cell*(q1*L*cP*gml + n1*g1^2/(g1^2 + (cP9 + cP7 + cP5 + cT)^2)*gml - (m1*L + m2*(1 - L))*cL_m);  // modifiers: cT, cP5, cP, cP9, cP7
  cL_m_trans: => cL; cell*((p2 + p1*L)*cL_m/gml - m3*cL - p3*cL^2/(cL^2 + g3^2));  // modifiers: cL_m
  cL_mod_pro: => cLmod; cell*(p3*cL^2/(cL^2 + g3^2) - m3*cLmod);  // modifiers: cL
  cP_prod: => cP; cell*(p7*(1 - L)*(1 - cP) - m11*cP*L);
  cE4_trscr: => cE4_m; cell*(n13*g2/(g2 + cEC)*g6^2/(g6^2 + cL^2)*gm4 - m34*cE4_m);  // modifiers: cL, cEC
  cE4_trans: => cE4; cell*(p23*cE4_m/gm4 - m35*cE4 - p25*cE4*cE3n + p21*cE34);  // modifiers: cE4_m, cE3n, cE34
  cE3_trscr: => cE3_m; cell*(n3*g16^2/(g16^2 + cL^2)*gm3 - m26*cE3_m);  // modifiers: cL
  cE3c_trans: => cE3c; cell*(p16*cE3_m/gm3 - m9*cE3c*cCOP1c - p17*cE3c*cGc - p19*cE3c + p20*cE3n);  // modifiers: cE3n, cE3_m, cGc, cCOP1c
  cE3n_trans: => cE3n; cell*(p19*cE3c - p20*cE3n - p17*cE3n*cGn - m30*cE3n*cCOP1d - m29*cE3n*cCOP1n + p21*cE34 - p25*cE4*cE3n);  // modifiers: cGn, cCOP1n, cE3c, cE4, cE34, cCOP1d
  cLUX_trscr: => cLUX_m; cell*(n13*g2/(g2 + cEC)*g6^2/(g6^2 + cL^2)*gm4 - m34*cLUX_m);  // modifiers: cL, cEC
  cLUX_trans: => cLUX; cell*(p27*cLUX_m/gm4 - m39*cLUX - p26*cLUX*cE34);  // modifiers: cLUX_m, cE34
  cCOP1c_prod: => cCOP1c; cell*(n5 - p6*cCOP1c - m27*cCOP1c*(1 + p15*L));
  cCOP1n_trans: => cCOP1n; cell*(p6*cCOP1c - n6*L*cP*cCOP1n - n14*cCOP1n - m27*cCOP1n*(1 + p15*L));  // modifiers: cP, cCOP1c
  cCOP1d_trans: => cCOP1d; cell*(n14*cCOP1n + n6*L*cP*cCOP1n - m31*(1 + m33*(1 - L))*cCOP1d);  // modifiers: cCOP1n, cP
  cEGc_prod: => cEGc; cell*(p17*cE3c*cGc - m9*cEGc*cCOP1c - p18*cEGc + p31*cEGn);  // modifiers: cE3c, cEGn, cGc, cCOP1c
  cEC_form: => cEC; cell*(p26*cLUX*cE34 - m36*cEC*cCOP1n - m37*cEC*cCOP1d - m32*cEC*(1 + p24*L*cGn_tot^2/(g7^2 + cGn_tot^2)));  // modifiers: cLUX, cCOP1n, cE34, cCOP1d
  cZTL_prod: => cZTL; cell*(p14 - p12*L*cZTL*cGc + p13*cZG*(1 - L) - m20*cZTL);  // modifiers: cZG, cGc
  cZG_prod: => cZG; cell*(p12*L*cZTL*cGc - p13*cZG*(1 - L) - m21*cZG);  // modifiers: cZTL, cGc
  cG_m_trscr: => cG_m; cell*(L*q2*cP*gmg + n12*g14/(g14 + cEC)*g15^2/(g15^2 + cL^2)*gmg - m18*cG_m);  // modifiers: cL, cEC, cP
  cG_trans: => cGc; cell*(p11*cG_m/gmg - p12*L*cZTL*cGc + p13*cZG*(1 - L) - m19*cGc - p17*cE3c*cGc - p28*cGc + p29*cGn);  // modifiers: cGn, cZG, cE3c, cG_m, cZTL
  cGn_traspo: => cGn; cell*(p28*cGc - (p29 + m19 + p17*cE3n)*cGn);  // modifiers: cE3n, cGc
  cE34_compl: => cE34; cell*(p25*cE4*cE3n - (p26*cLUX + p21 + m37*cCOP1d + m36*cCOP1n)*cE34);  // modifiers: cLUX, cCOP1n, cE4, cE3n, cCOP1d
  cEGn_tranp: => cEGn; cell*(p18*cEGc + p17*cE3n*cGn - (m9*cCOP1n + m10*cCOP1d + p31)*cEGn);  // modifiers: cGn, cCOP1n, cEGc, cE3n, cCOP1d
  cP9mt_synt: => cP9_m; cell*(q3t*L*cP*gm9 + nt1*(g1t + at1*cLmod)/(g1t + cLmod)*g2t^2/(g2t^2 + cL^2)*g3t/(g3t + cEC)*g4t^2/(g4t^2 + (cP5 + cT)^2)*gm9 - m1t*cP9_m);  // modifiers: cL, cEC, cT, cP5, cP, cLmod
  cP9t_synt: => cP9; cell*(p1t*cP9_m/gm9 - mp1t*cP9);  // modifiers: cP9_m
  cP7msynt: => cP7_m; cell*(nt2*g5t^2/(g5t^2 + cL^2)*g6t/(g6t + cEC)*g7t^2/(g7t^2 + (cP5 + cT)^2)*gm7 - m2t*cP7_m);  // modifiers: cL, cEC, cT, cP5
  cP7tsynt: => cP7; cell*(p2t*cP7_m/gm7 - (mp2t + mp3t*(1 - L))*cP7);  // modifiers: cP7_m
  cP5mtsynt: => cP5_m; cell*(nt3*(g8t + at2*cLmod)/(g8t + cLmod)*g9t^2/(g9t^2 + cL^2)*g10t/(g10t + cEC)*g11t^2/(g11t^2 + cT^2)*gm5 - m3t*cP5_m);  // modifiers: cL, cEC, cT, cLmod
  cP5tsynt: => cP5; cell*(p3t*cP5_m/gm5 - (mp4t + mp5t*(1 - L))*cP5);  // modifiers: cP5_m
  cTmtsynt: => cT_m; cell*(nt4*(g12t + at3*cLmod)/(g12t + cLmod)*g13t^2/(g13t^2 + cL^2)*g14t/(g14t + cEC)*g15t^2/(g15t^2 + cT^2)*gmt - m4t*cT_m);  // modifiers: cL, cEC, cT, cLmod
  cTtsynt: => cT; cell*(p4t*cT_m/gmt - (mp6t + mp7t*(1 - L))*cT*(p5t*cZTL + cZG) - mp8t*cT);  // modifiers: cZG, cT_m, cZTL

  // Unit definitions:
  unit substance = 1e-9 mole; substance is "nM (default)";
  unit extent = 1e-9 mole;
  unit time_unit = 3600 second; time_unit is "hour (default)";
  unit area = metre^2;
  unit length = metre;
  unit volume = litre;
end
